# MATHCAD PRIME API APPLICATIONS
# Define variables input1 and matrixInput1 and designate their regions as Input regions.
input1 := 12.2341 kg
matrixInput1 := [1, -7, 76; 2, 3, 5; 1/2, 3.4, -9.3] N
# Define variables output1 and matrixOutput1
output1 := input1*2
matrixOutput1 := matrixInput1
# Evaluate variables output1 and matrixOutput1 and designate their regions as Output regions.
output1 = 24.4682 kg
matrixOutput1 = [1, -7, 76; 2, 3, 5; 0.5, 3.4, -9.3] N
